*Heading
** Job name: Static Model name: Model-1
** Generated by: Abaqus/CAE Student Edition 2021
*Preprint, echo=NO, model=NO, history=NO, contact=NO
**
** PARTS
**
*Part, name=Dam_foundation
*Node
      1,  -28.5125008,         -47.
      2,   65.4875031,         -47.
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*Element, type=CPE3
  1, 149, 112, 147
  2, 175, 172, 131
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*Nset, nset=Concrete_1
   5,   6,   8,   9,  10,  11
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*Elset, elset=Concrete_1, generate
 452,  511,    1
*Nset, nset=Concrete_2
   4,   5,   8,  43,  44,  45
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*Elset, elset=Concrete_2, generate
 412,  451,    1
*Nset, nset=Rock
   1,   2,   3,   4,   5,   6
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*Elset, elset=Rock, generate
   1,  411,    1
** Section: Rock
*Solid Section, elset=Rock, material=Rock
,
** Section: Concrete_2
*Solid Section, elset=Concrete_2, material=Concrete_2
,
** Section: Concrete_1
*Solid Section, elset=Concrete_1, material=Concrete_1
,
*End Part
**
**
** ASSEMBLY
**
*Assembly, name=Assembly
**
*Instance, name=Dam_foundation-1, part=Dam_foundation
*End Instance
**
*Nset, nset=BC_Y, instance=Dam_foundation-1
  1,  2, 12, 13, 14, 15
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*Elset, elset=BC_Y, instance=Dam_foundation-1
  23,  53,  55,  86,  87,  88
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*Nset, nset=Set-1, instance=Dam_foundation-1
  1,  2,  3,  7, 30, 31
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*Elset, elset=Set-1, instance=Dam_foundation-1
  23,  32,  47,  49,  55,  72
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*Elset, elset=_NFU_S2, internal, instance=Dam_foundation-1
 466, 496, 498, 500, 502, 504, 506, 508, 510
*Surface, type=ELEMENT, name=NFU
_NFU_S2, S2
*End Assembly
**
** MATERIALS
**
*Material, name=Concrete_1
*Density
2500.,
*Elastic
 3.25e+10, 0.14
*Material, name=Concrete_2
*Density
2500.,
*Elastic
 2.75e+10, 0.14
*Material, name=Rock
*Elastic
 1.7e+10, 0.14
** ----------------------------------------------------------------
**
** STEP: Static
**
*Step, name=Static, nlgeom=NO
*Static
1., 1., 1e-05, 1.
**
** BOUNDARY CONDITIONS
**
** Name: BC_X Type: Displacement/Rotation
*Boundary
Set-1, 1, 1
** Name: BC_Y Type: Displacement/Rotation
*Boundary
BC_Y, 2, 2
**
** LOADS
**
** Name: Gravity   Type: Gravity
*Dload
, GRAV, 9.8, 0., -1.
** Name: NFU   Type: Pressure Using Field: NFU
*Dload
Dam_foundation-1.466, P2, 407244.
Dam_foundation-1.496, P2, 23955.6
Dam_foundation-1.498, P2, 71866.7
Dam_foundation-1.500, P2, 359333.
Dam_foundation-1.502, P2, 311422.
Dam_foundation-1.504, P2, 263511.
Dam_foundation-1.506, P2, 215600.
Dam_foundation-1.508, P2, 167689.
Dam_foundation-1.510, P2, 119778.
**
** OUTPUT REQUESTS
**
*Restart, write, frequency=0
**
** FIELD OUTPUT: F-Output-1
**
*Output, field
*Node Output
U,
*Element Output, directions=YES
E, S
**
** HISTORY OUTPUT: H-Output-1
**
*Output, history, variable=PRESELECT
*End Step
